ω := 500*2*π*sec^-1
R := 49*cm
H := 2.899*cm
ρ := 1300*cm
γ := ω*R^2/H = 26019.2 m/s
h := 6.636*10^-34*m^2*kg/s
m_n := 1.675*10^-27*kg
ε_beg := 150
ε_end := 10
v(ε) := sqrt(2*1.60218*10^-22*J/m_n*ε)
v(ε_beg) = 5356.84 m/s
v(ε_end) = 1383.13 m/s
κ(ε) := (1/(2*ω*ρ) + 1/v(ε))^-1
κ(ε_beg) = 5027.15 m/s
κ(ε_end) = 1360.1 m/s
