InInterest := 0.0228
LT := 7.5
IP := 2
SUMM := 85000 - 30000
FEE := 0
FInterest := 0.0228
SUMM = 55000
N_P := LT*12
N_IP := IP*12
S_Tot := SUMM + FEE
DII := InInterest/12
S_Tot = 55000
DFI := FInterest/365
Q := 1 + DII
Payment(SUMM, Interest, N_P) :=
    Q ← 1 + Interest/12
    SUMM*Q^N_P/(Q^N_P - 1)*Interest/12
Payment(S_Tot, InInterest, N_P) = 665.428
i := 0 .. N_P - 1
N_P = 90
Loan(SUMM, np, DII) :=
    Q ← 1 + DII
    pmnt ← SUMM*Q^N_P/(Q^N_P - 1)*DII
    rez ← (SUMM - pmnt/DII)*Q^np + pmnt/DII
    rez
100611/170000 = 0.591829
Capital_Repaid(Summ, Comp_Termn_Month, rate) :=
    rate_pMonth ← rate/12
    Summ - Loan(Summ, Comp_Termn_Month, rate_pMonth)
Interest_paid(Summ, Comp_Termn_Month, rate, LoanTermMonth) :=
    MonthlyPayment ← Payment(Summ, rate, LoanTermMonth)
    AllPaid ← MonthlyPayment*Comp_Termn_Month
    interest ← AllPaid - Capital_Repaid(Summ, Comp_Termn_Month, rate)
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Q^N_P = 1.1863
Loan(S_Tot, N_P, DII) = 0
Loan(S_Tot, 1, DII) = 54439.1
Capital_Repaid(S_Tot, 12, InInterest) = 6801.93
Payment(S_Tot, InInterest, LT*12) = 665.428
Interest_Repaid := Payment(S_Tot, InInterest, N_P)*12 - Capital_Repaid(S_Tot, 12, InInterest)
Interest_Repaid = 1183.21
# _________________________________________________________________________________________
# Mortgage end date:
1964 + 65 = 2029
# Years left:
2029 - 2022 = 7
6.6667*12 = 80.0004
SUMM := 84800
Term := 6.6667
Base_Rate := 0.0194
SUMM := 29647
# HSBC
# :
200*12 = 2400
BASE := Loan(SUMM, Term, Base_Rate/12)
11200.526/SUMM = 0.377796
BASE_VAL_AND_COMPL := 0
BASE_Pmnt := Payment(SUMM, Base_Rate, Term*12)
PaidSUMM := BASE_Pmnt*Term
Interest_paid(SUMM, 24, 0.0249, Term*12) = 2288.66
BASE = 27595.7
BASE_Pmnt = 395.366
PaidSUMM = 2635.79
100*24 - 1500 = 900
InterestPaid(Summ, rate, CompTerm_Month) := Interest_paid(Summ, CompTerm_Month, rate, Term*12)
Interest_paid(SUMM + 1500, 24, 0.0099, Term*12) = 1578.5
5200.201 - 2370.175 - 1500 = 1330.03
InterestPaid(SUMM, 0.01, 12) = 773.062
Payed(Summ, Interest, Valuation_andCompl_notAdded2Loan, Term) := Payment(Summ, Interest, Term*12)*Term + Valuation_andCompl_notAdded2Loan
LoanLeft(Summ, rate, Term) :=
    rate_pMonth ← rate/12
    Loan(Summ, Term, rate_pMonth)
AnnualPrice(Summ, rate, Valuation_andCompl_notAdded2Loan, Term) := Payed(Summ, rate, Valuation_andCompl_notAdded2Loan, Term)*12/Term
Profit(Sum, Rate, VandC, CompTime) := (InterestPaid(SUMM, Base_Rate, CompTime) + BASE_VAL_AND_COMPL - (InterestPaid(Sum, Rate, CompTime) + VandC))
InterestPaid(SUMM, 0.0249, 24) = 2288.66
Payed(SUMM, 0.075, 175, 24) = 5508.65
InterestPaid(SUMM, 0.0099, 24) = 1502.48
LoanLeft(SUMM, 0.075, 24) = 23288.1
Profit(SUMM, 0.0324, 0, 24) = -685.351
Profit(SUMM, 0.0099, 1500, 24) = -1003.03
InterestPaid(SUMM, 0.0249, 24) = 2288.66
5013.25/24 = 208.885
InterestPaid(SUMM, 0.024, Term*12) = 6027.86
InterestPaid(SUMM, 0.01, Term*12) = 4416.36
# Calculate interest rate from payments
InterestPaid(SUMM, 0.024, 1) = 100.411
Loan := 101120.69
days := 28
Interest := 207.02
InterestPaid(SUMM, 0.0129, 1) = 73.0387
ln((Loan + Interest)/Loan)*365/days = 0.0266602
365/days*Interest/Loan = 0.0266875
(1 + Interest/Loan)^(365/days) - 1 = 0.0270187
Interest_paid(SUMM + 1500, 1, 0.099, MonthlyPayment)
# [component: outputs DATA]
nc := 0 .. rows(DATA) - 1
payment[nc] := Payment(DATA[nc, 2] + SUMM, DATA[nc, 3], Term*12)
LoanPayed[nc] := Payed(DATA[nc, 2] + SUMM, DATA[nc, 3], DATA[nc, 4], DATA[nc, 1])
leftLoan[nc] := LoanLeft(DATA[nc, 2] + SUMM, DATA[nc, 3], 12*2)
DATA = [
    "HCBC fix 2 Yr fee saver", 24, 0, 0.0154, 0;
    "HCBC fix 2 Yr ", 24, 999, 0.0114, 0;
    "HCBC fix 3 Yr", 36, 999, 0.0144, 0;
    "HCBC fix 3 Yr fee saver", 36, 0, 0.0179, 0;
    "HCBC fix 5 Yr fee saver", 60, 0, 0.0194, 0;
    "HCBC fix 5 Yr std", 60, 999, 0.0169, 0;
    "YBS", 24, 1495, 0.0098, 220;
    "Woolwich Building Society", 60, 999, 0.0189, 220;
    "Terrible rate Impact 6", 24, 0, 0.06, 0;
    "Terrible rate Impact 10", 24, 0, 0.1, 0;
    "Terrible rate Impact 15", 24, 0, 0.15, 0;
    "Tescko fix 5", 60, 0, 0.0239, 0;
    "Natwest fix no fee", 24, 0, 0.0229, 0;
    "Natwest fix 5", 60, 995, 0.023, 0
]
profit[nc] := Profit(DATA[nc, 2] + SUMM, DATA[nc, 3], DATA[nc, 4] + DATA[nc, 2], 12*2)
LoanPayedPerYear[nc] := LoanPayed[nc]*12/DATA[nc, 1]
InterestPayedPerYear[nc] := InterestPaid(DATA[nc, 2] + SUMM, DATA[nc, 3], 12)
CmpTABLE := augment(DATA, payment, LoanPayed, leftLoan, profit, LoanPayedPerYear, InterestPayedPerYear)
# [component: inputs CmpTABLE]
60*24 = 1440
# HSBC Mortgage appl:
# Kate Lids DSS
# T:0800494999 opt 1 ext 20450
# RefN 1530787963
#
# Branch: Princess Street 118
#
# Last payment on  01/06/2029
