h := 6.636*10^-34*m^2*kg/s
m_n := 1.675*10^-27*kg
m_e := 9.109*10^-31*kg
eV := 1.60218*10^-19*J
# eV -- resonance value for Fe in 001 direction (6
# wavelength-es)
41/400 = 0.1025
359*10^-3
ε := 200
807*10^-3  # eV -- resonance value for Fe in 001 direction (9 wavelength-es)
7/800 = 0.00875
1435*10^-3  # eV -- resonance value for Fe in 001 direction (12 wavelength-es)
32/1371 = 0.0233406
v := sqrt(2*1.60218*10^-22*J/m_n*ε)
λ := h/(m_n*v)
k := 2*π*m/(h*10^10)*sqrt(ε*m_n*2*1.60218*10^-22*J)
k = 9.80994
v = 6185.55 m/s
λ = 0.640491 Angstrom
1/λ = 1.5613 1/Angstrom
k_1 := sqrt(ε/2.072) = 9.82472
ε(λ) := h^2/(2*(2*1.60218*10^-22*J*m_n*λ^2))
2.87*Angstrom/λ = 4.48093
k = 9.80994
ε(4*Angstrom) = 2.56393
1/(2.87*sqrt(2)) = 0.246379
1/2.87 = 0.348432
1/(2.87*2) = 0.174216
sqrt(1000/2.072) = 21.9687
# the coefficient of transformation from root of energy in mEv to wavevector in A^-1
C_k := 2*π/h*sqrt(m_n*2*1.60218*10^-22*J)*m/10^10
81.81/(2*π)^2 = 2.07227
C_k = 0.693668
sqrt(1/2.702) = 0.608355
1 V = 1 V
Δt := (4400 - 2844)*μs
L := (4.2470 + 1.5)*m
E := m_n/(2*eV*10^-3)*(L/Δt)^2
E = 71.3077
Δt := (4400 - 2822)*μs
L := (4.2470 + 1.5)*m
E := m_n/(2*eV*10^-3)*(L/Δt)^2
E = 69.3333
k_0 := 2*π/2.87*sqrt(2)
ε_1[i] := Δε + i*δε  # error: This variable is undefined.
Q500[i] := Q(ε_1[i], Δε)/k_0  # error: This variable is undefined.
Δε := 800
ε_2[i] := Δε + i*δε  # error: This variable is undefined.
Q800[i] := Q(ε_2[i], Δε)/k_0  # error: This variable is undefined.
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ε := 1400
fqx(Δε, ψ) := C_k*(sqrt(ε) - sqrt(ε - Δε))
fqy(Δε, ψ) := C_k*sqrt(ε - Δε)*cos(ψ)
fqz(Δε, ψ) := C_k*sqrt(ε - Δε)*sin(ψ)
N_i := 50
N_j := 50
i := 0 .. N_i
j := 0 .. N_j
δψ := (30 + 60)/(N_j*180)*π
δε := 600/N_i
Δε[i] := 0 + i*δε
ψ[j] := -60/180*π + δψ*j
C_k = 0.693668
F(x, y) := [fqx(x, y); fqy(x, y); fqz(x, y)]
plot := CreateMesh(F, Δε, ψ)  # error: This value must be an integer.
