h := 6.636*10^-34*m^2*kg/s
m_n := 1.6749*10^-27*kg
k_b := 1.38064852*10^-23*J/K
eV := 1.60218*10^-19*J
ω := 500*2*π*sec^-1
# Merlin Gd chopper:
R_ch := 5*mm
H_ch := 0.2*mm
ρ := 10^6*m
γ := ω*R_ch^2/H_ch = 392.699 m/s
ω = 3141.59 1/s
L := 1 m
L_mod := 10 m
L_det := 2.5*m
L_mon1 := -1.504 + 11.8 + 0.1
L_mon2 := 4.247 + 11.8 + 0.1
L_mon1 = 10.396
h := 6.636*10^-34*m^2*kg/s
m_n := 1.675*10^-27*kg
ε_beg := 150
ε_end := 11
Δt := R_ch/γ
Δt = 1.27324e-5 s
v(ε) := sqrt(2*1.60218*10^-22*J/m_n*ε)
v(ε_end) = 1450.64 m/s
τ_e(ε, L) := L*ω*R_ch/(v(ε)*H_ch)
v(ε_beg) = 5356.84 m/s
τ_e(151.9276, L_mon1*m) = 151.452
# Resolution by '0' energy level:
Δε(ε) := ε*2*Δt*v(ε)/L_det
Δε(ε_beg) = 8.18465
Δε(ε_end) = 0.162537
2*Δt*v(ε_beg)/L_det = 0.0545643
2*Δt*v(ε_end)/L_det = 0.0147761
f_ch(v, τ, t_m) :=
    gm ← 4*R_ch/v
    return 0 if gm > 4
    otherwise
        ff ← 1 - v/(4*R_ch)*(2*R_ch/v + |τ - t_m|)^2
        if gm ≥ 1 and gm ≤ 4
            return 0 if ff < 0
            return ff otherwise
        otherwise
            f1 ← 1 - 2*|τ - t_m|
            return 0 if f1 < 0
            otherwise
                return ff if f1 > 1 - 4*R_ch/v
                return f1 otherwise
cut(data, E_min, E_max, E_i) :=
    np ← length(data[:, 0])
    ic ← 0
    for i ∈ 0 .. np - 1
        if data[i, 0] ≥ E_min and data[i, 0] ≤ E_max
            rez[ic, 0] ← data[i, 0] - E_i
            rez[ic, 1] ← data[i, 1]
            ic ← ic + 1
    return rez
expand(data, st, E_min, E_max) :=
    Np ← floor((E_max - E_min)/st) + 1
    ns ← length(data[:, 0])
    for i ∈ 0 .. Np
        e ← E_min + st*i
        rez[i, 0] ← e
        rez[i, 1] ← 0 if e < data[0, 0] or e > data[ns - 1, 0]
        rez[i, 1] ← linterp(data[:, 0], data[:, 1], e) otherwise
    return rez
transpose(x, shift, L) :=
    Np ← length(x)
    for i ∈ 0 .. Np - 1
        x[i] ← x[i] - shift
        x[i] ← x[i] + L if x[i] < L/2
        x[i] ← x[i] - L if x[i] > L/2
    return x
# Investigating pulse time widening to estimate what width is responsible for moderator widening and which one -- for the energy spread
# [component: outputs tof_mon]
tof_mon[1, 1] = 69633
extract_m(mon_info, det_id) :=
    np ← length(mon_info[:, 0])
    ic ← 0
    for i ∈ 0 .. np - 1
        if mon_info[i, 1] == det_id
            rez[ic, 0] ← mon_info[i, 0]*10^-6*sec/Δt
            rez[ic, 1] ← mon_info[i, 2]
            rez[ic, 2] ← mon_info[i, 3]
            ic ← ic + 1
    return rez
t_mon1 := extract_m(tof_mon, 69634)
t_mon2 := extract_m(tof_mon, 69638)
(1.07*10^-3*sec)/Δt = 84.0376
t_mon2[:, 0] := transpose(t_mon2[:, 0], (1.07*10^-3*sec)/Δt, 0.2*sec/Δt)
2994.5 - 1924.5 = 1070
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En := [151.9276, 64.9625, 35.688, 22.462, 15.439; 0, 0, 0, 0, 0]
v(ε) := sqrt(2*1.60218*10^-22*J/m_n*ε)
τ(L, ε) := L*m/Δt*sqrt(m_n/(2*ε*1.60218*10^-22*J))  # τ in mksec/Dt
τ_pe(en) :=
    Np ← cols(en) - 1
    for i ∈ 0 .. Np
        rez[0, i] ← τ(L_mon1, en[0, i])
        rez[1, i] ← τ(L_mon2, en[0, i])
        rez[2, i] ← en[1, i]
    return rez
tt := 1926.638*10^-6*sec/Δt = 151.318
τ(L_mon1, 151.9277) = 151.452
τ_peaks := τ_pe(En)
τ_peaks = [
    151.452, 231.612, 312.487, 393.884, 475.098;
    235.234, 359.739, 485.353, 611.779, 737.919;
    0, 0, 0, 0, 0
]
τ_peaks[0, 1] = 231.612
τ_peaks[1, 1] = 359.739
t_mon1 := extract_m(tof_mon, 69634)
t_mon2 := extract_m(tof_mon, 69638)
normalize(z) :=
    Nrm ← (z[1, 0] - z[0, 0])*sum(z[:, 1])
    z[:, 1] ← z[:, 1]/Nrm
    return z
propagate(τ_peaks, t_mon1, t_mon2) :=
    nInt ← cols(τ_peaks) - 1
    for i ∈ 0 .. nInt
        ic ← 0
        t_min ← τ_peaks[0, i]*0.99
        t_max ← τ_peaks[0, i]*1.05
        for j ∈ 0 .. rows(t_mon1) - 1
            tt ← t_mon1[j, 0]
            if tt ≥ t_min and tt ≤ t_max
                V ← L_mon1/tt
                t_p ← tt + (τ_peaks[1, i] - τ_peaks[0, i]) - τ_peaks[2, i]
                rz[ic, 0] ← t_p
                rz[ic, 1] ← t_mon1[j, 1]
                rz[ic, 2] ← t_mon1[j, 2]
                ic ← ic + 1
        rz ← normalize(rz)
        rez[i*2] ← rz
        ic ← 0
        t_min ← τ_peaks[1, i]*0.99
        t_max ← τ_peaks[1, i]*1.05
        for j ∈ 0 .. rows(t_mon2) - 1
            tt ← t_mon2[j, 0]
            if tt ≥ t_min and tt ≤ t_max
                rz[ic, 0] ← tt
                rz[ic, 1] ← t_mon2[j, 1]
                rz[ic, 2] ← t_mon2[j, 2]
                ic ← ic + 1
        rz ← normalize(rz)
        rez[2*i + 1] ← rz
    rez
t_shift := (L_mon2 - L_mon1)/V
exp_pls := propagate(τ_peaks, t_mon1, t_mon2)
transpose(exp_pls) = [[
    233.754, 0.0136419, 11.1355;
    233.833, 0.0199128, 13.4536;
    233.911, 0.0228832, 14.4222;
    233.99, 0.0332246, 17.3781;
    234.068, 0.0517072, 21.6795;
    234.147, 0.0798711, 26.9444;
    234.225, 0.128388, 34.1614;
    234.304, 0.182405, 40.7185;
    234.382, 0.252705, 47.927;
    234.461, 0.340387, 55.6237
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], [
    232.91, 0.049956, 20.7605;
    232.988, 0.0501878, 20.8087;
    233.067, 0.051115, 21;
    233.145, 0.0528536, 21.3542;
    233.224, 0.0581854, 22.4054;
    233.303, 0.0654875, 23.7697;
    233.381, 0.0676897, 24.1661;
    233.46, 0.0672261, 24.0832;
    233.538, 0.0778896, 25.923;
    233.617, 0.0807873, 26.4008
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], [
    357.423, 0.000432667, 2.64575;
    357.502, 0.000494476, 2.82843;
    357.58, 0.000494476, 2.82843;
    357.659, 0.000988953, 4;
    357.738, 0.000679905, 3.31662;
    357.816, 0.00111257, 4.24264;
    357.895, 0.00166886, 5.19615;
    357.973, 0.00203971, 5.74456;
    358.052, 0.00302867, 7;
    358.13, 0.00284324, 6.78233
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], [
    356.217, 0.0235837, 20.567;
    356.296, 0.0219111, 19.8242;
    356.374, 0.0245872, 21;
    356.453, 0.0274307, 22.1811;
    356.531, 0.0288245, 22.7376;
    356.61, 0.0298838, 23.1517;
    356.689, 0.0288245, 22.7376;
    356.767, 0.0298838, 23.1517;
    356.846, 0.0329502, 24.3105;
    356.924, 0.0350131, 25.0599
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], [
    482.273, 0.000138275, 1.41421;
    482.352, 0, 0;
    482.43, 0.000414824, 2.44949;
    482.509, 0.00076051, 3.31662;
    482.587, 0.000483961, 2.64575;
    482.666, 0.000622236, 3;
    482.745, 0.000967922, 3.74166;
    482.823, 0.000898785, 3.60555;
    482.902, 0.00131361, 4.3589;
    482.98, 0.00200498, 5.38516
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], [
    480.546, 0.0139161, 13.8924;
    480.624, 0.0149977, 14.4222;
    480.703, 0.016584, 15.1658;
    480.781, 0.0187471, 16.1245;
    480.86, 0.0157187, 14.7648;
    480.939, 0.0182424, 15.906;
    481.017, 0.0183866, 15.9687;
    481.096, 0.0178819, 15.748;
    481.174, 0.0197566, 16.5529;
    481.253, 0.021415, 17.2337
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], [
    607.884, 0.000740766, 2.64575;
    607.962, 0.00116406, 3.31662;
    608.041, 0.00190483, 4.24264;
    608.119, 0.00148153, 3.74166;
    608.198, 0.00201065, 4.3589;
    608.276, 0.00380965, 6;
    608.355, 0.00423295, 6.32456;
    608.433, 0.00571448, 7.34847;
    608.512, 0.0062436, 7.68115;
    608.591, 0.00761931, 8.48528
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], [
    605.738, 0.0137422, 9.53939;
    605.817, 0.0129872, 9.27362;
    605.895, 0.0158564, 10.247;
    605.974, 0.0167625, 10.5357;
    606.052, 0.0126851, 9.16515;
    606.131, 0.0143463, 9.74679;
    606.21, 0.0185747, 11.0905;
    606.288, 0.0176686, 10.8167;
    606.367, 0.0178196, 10.8628;
    606.445, 0.0193297, 11.3137
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], [
    733.235, 0.00283635, 4;
    733.314, 0.00389999, 4.69042;
    733.393, 0.00514089, 5.38516;
    733.471, 0.00886361, 7.07107;
    733.55, 0.00797725, 6.7082;
    733.628, 0.00833179, 6.85565;
    733.707, 0.0113454, 8;
    733.785, 0.0134727, 8.7178;
    733.864, 0.012409, 8.3666;
    733.942, 0.0189681, 10.3441
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], [
    730.617, 0.00932048, 5.47723;
    730.695, 0.0105632, 5.83095;
    730.774, 0.0111846, 6;
    730.852, 0.0111846, 6;
    730.931, 0.00994184, 5.65685;
    731.009, 0.0105632, 5.83095;
    731.088, 0.0130487, 6.48074;
    731.166, 0.0118059, 6.16441;
    731.245, 0.0152234, 7;
    731.323, 0.0152234, 7
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]]
pt1 := exp_pls[0]
pc1 := exp_pls[1]
pt2 := exp_pls[2]
pc2 := exp_pls[3]
(pt1[1, 0] - pt1[0, 0])*sum(pt1[:, 1]) = 1
pt3 := exp_pls[4]
pc3 := exp_pls[5]
pt4 := exp_pls[6]
pc4 := exp_pls[7]
pt5 := exp_pls[8]
pc5 := exp_pls[9]
(pc1[1, 0] - pc1[0, 0])*sum(pc1[:, 1]) = 1
τ_e(En[0, 0], L_mod) = 145.683
f_ch(v(En[0, 0])*Δt, pc1[0, 0], τ_peaks[1, 1]) = 0
ip1 := 0 .. length(pt1[:, 0]) - 1
ip2 := 0 .. length(pt1[:, 1]) - 1
τ_peaks[1, 0] = 235.234
τ_peaks[1, 1] = 359.739
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ip3 := 0 .. length(pt3[:, 1]) - 1
ip4 := 0 .. length(pt4[:, 1]) - 1
τ_peaks[1, 2] = 485.353
τ_peaks[1, 3] = 611.779
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ip5 := 0 .. length(pt5[:, 1]) - 1
τ_peaks[1, 4] = 737.919
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# ------------------------------------------------------------------------------------------------------------------------------------------------------------------------------
