h := 6.636*10^-34*m^2*kg/s
m_n := 1.675*10^-27*kg
k_b := 1.38064852*10^-23*J/K
eV := 1.60218*10^-19*J
a_1 := 10
σ_1 := 0.5
x_1 := 10
a_2 := 15
σ_2 := 2
x_2 := 25
a_3 := 10
σ_3 := 5
x_3 := 35
f(x) := a_1/(sqrt(2*π)*σ_1)*e^(-|(x - x_1)/(2*σ_1)|) + a_2/(sqrt(2*π)*σ_2)*e^(-(x - x_2)^2/(2*σ_2^2)) + a_3/(sqrt(2*π)*σ_3)*e^(-(x - x_3)^2/(2*σ_3^2))
L := 120
N := 60
Δ := L/N
i := 1 .. N
x[i] := -L/2 + i*Δ
fi[i] := f(x[i])
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σ_R := 20
η(x) :=
    0 if x < 0
    1 otherwise
Rf(τ) := 1/(sqrt(2*π)*σ_R)*e^(-1/2*(τ/σ_R)^2)*η(τ)
fm(x) := integral(f(τ)*Rf(x - τ), τ = x*(-4)*σ_R .. x) + integral(f(τ)*Rf(x - τ), τ = x .. x + 4*σ_R)
I[i] := fm(x[i])
integral(Rf(τ), τ = -4*σ_R .. 4*σ_R) = 0.499968
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I_ω := cfft(I)
f_ω := cfft(fi)
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Rfi[i] := Rf(x[i])
F_R := cfft(Rfi)
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filt(I, R) :=
    I/R if |R| > 10^-6
    0 otherwise
a[i] := filt(I_ω[i], F_R[i])
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ar := 1/(4*sqrt(π))*icfft(a)
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# [component: outputs SpEi36]
# [component: outputs mon1]
# [component: outputs SpEi64]
# [component: outputs mon2]
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cut(data, E_min, E_max, E_i) :=
    np ← length(data[:, 0])
    ic ← 0
    for i ∈ 0 .. np - 1
        if data[i, 0] ≥ E_min and data[i, 0] ≤ E_max
            rez[ic, 0] ← data[i, 0] - E_i
            rez[ic, 1] ← data[i, 1]
            ic ← ic + 1
    return rez
r1 := cut(mon1, 40, 100, 63.605)
r2 := cut(mon1, 30, 60, 34.955)
δE_1 := r1[1, 0] - r1[0, 0]
δE_2 := r2[1, 0] - r2[0, 0]
δE_1 = 0.01
δE_2 = 0.01
Ir1 := (r1[1, 0] - r1[0, 0])*sum(r1[:, 1])
Ir1 = 210405
r1[:, 1] := r1[:, 1]/Ir1
r2[:, 1] := r2[:, 1]/Ir1
(r1[1, 0] - r1[0, 0])*sum(r1[:, 1]) = 1
(r1[1, 0] - r1[0, 0])*sum(r2[:, 1]) = 0.890389
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expand(data, st, E_min, E_max) :=
    Np ← floor((E_max - E_min)/st) + 1
    ns ← length(data[:, 0])
    for i ∈ 0 .. Np
        e ← E_min + st*i
        rez[i, 0] ← e
        rez[i, 1] ← 0 if e < data[0, 0] or e > data[ns - 1, 0]
        rez[i, 1] ← linterp(data[:, 0], data[:, 1], e) otherwise
    return rez
E_min := -30
E_max := 30
st2 := 0.15
st1 := 0.31
R1 := expand(r1, st1, E_min, E_max)
R2 := expand(r2, st2, E_min, E_max)
length(R1[:, 0]) = 195
SR2 := cfft(R2[:, 1])
SR1 := cfft(R1[:, 1])
length(SR1) = 195
i2 := 0 .. length(R2[:, 0]) - 1
i1 := 0 .. length(R1[:, 0]) - 1
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I1 := expand(SpEi64, st1, E_min, E_max)
I1_ω := cfft(I1[:, 1])
I2 := expand(SpEi36, st2, E_min, E_max)
I2_ω := cfft(I2[:, 1])
F1_ω[i1] := I1_ω[i1]/SR1[i1]
F2_ω[i2] := I2_ω[i2]/SR2[i2]
F1 := icfft(F1_ω)
F2 := icfft(F2_ω)
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transpose(x, shift, L) :=
    Np ← length(x)
    for i ∈ 0 .. Np - 1
        x[i] ← x[i] - shift
        x[i] ← x[i] + L if x[i] < L/2
        x[i] ← x[i] - L if x[i] > L/2
    return x
x1 := transpose(I1[:, 0], -28, E_max - E_min)
x2 := transpose(I2[:, 0], -29, E_max - E_min)
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# Investigating pulse time widening to estimate what width is responsible for moderator widening and which one -- for the energy spread
# [component: outputs tof_mon]
tof_mon[1, 1] = 69633
extract(mon_info, det_id) :=
    np ← length(mon_info[:, 0])
    ic ← 0
    for i ∈ 0 .. np - 1
        if mon_info[i, 1] == det_id
            rez[ic, 0] ← mon_info[i, 0]
            rez[ic, 1] ← mon_info[i, 2]
            rez[ic, 2] ← mon_info[i, 3]
            ic ← ic + 1
    return rez
t_mon1 := extract(tof_mon, 69634)
t_mon2 := extract(tof_mon, 69638)
t_mon2[:, 0] := transpose(t_mon2[:, 0], 1.07*10^3, 20000)
2994.5 - 1924.5 = 1070
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L_mon1 := -1.504 + 11.8
L_mon2 := 4.247 + 11.8
En := [152.49, 65.21, 35.79, 22.53, 15.48; 5.5, 8, 15, 1, 0]
τ(L, e) := L*m/(10^-6*s)*sqrt(m_n/(2*e*10^-3*eV))  # τ in mksec
τ_pe(en) :=
    Np ← cols(en) - 1
    for i ∈ 0 .. Np
        rez[0, i] ← τ(L_mon1, en[0, i])
        rez[1, i] ← τ(L_mon2, en[0, i])
        rez[2, i] ← en[1, i]
    return rez
τ_peaks := τ_pe(En)
τ_peaks = [
    1906.27, 2915.06, 3934.82, 4959.35, 5983.01;
    2971.05, 4543.32, 6132.67, 7729.48, 9324.92;
    5.5, 8, 15, 1, 0
]
τ_peaks[0, 1] = 2915.06
τ_peaks[1, 1] = 4543.32
t_mon1 := extract(tof_mon, 69634)
t_mon2 := extract(tof_mon, 69638)
normalize(z) :=
    Nrm ← (z[1, 0] - z[0, 0])*sum(z[:, 1])
    z[:, 1] ← z[:, 1]/Nrm
    return z
propagate(τ_peaks, t_mon1, t_mon2) :=
    nInt ← cols(τ_peaks) - 1
    for i ∈ 0 .. nInt
        ic ← 0
        t_min ← τ_peaks[0, i]*0.99
        t_max ← τ_peaks[0, i]*1.05
        for j ∈ 0 .. rows(t_mon1) - 1
            tt ← t_mon1[j, 0]
            if tt ≥ t_min and tt ≤ t_max
                V ← L_mon1/tt
                t_p ← tt + (L_mon2 - L_mon1)/V - τ_peaks[2, i]
                rz[ic, 0] ← t_p
                rz[ic, 1] ← t_mon1[j, 1]
                rz[ic, 2] ← t_mon1[j, 2]
                ic ← ic + 1
        rz ← normalize(rz)
        rez[i*2] ← rz
        ic ← 0
        t_min ← τ_peaks[1, i]*0.99
        t_max ← τ_peaks[1, i]*1.05
        for j ∈ 0 .. rows(t_mon2) - 1
            tt ← t_mon2[j, 0]
            if tt ≥ t_min and tt ≤ t_max
                rz[ic, 0] ← tt
                rz[ic, 1] ← t_mon2[j, 1]
                rz[ic, 2] ← t_mon2[j, 2]
                ic ← ic + 1
        rz ← normalize(rz)
        rez[2*i + 1] ← rz
    rez
exp_pls := propagate(τ_peaks, t_mon1, t_mon2)
transpose(exp_pls) = [[
    2936.29, 3.30892e-5, 2.44949;
    2937.85, 3.30892e-5, 2.44949;
    2939.41, 6.06635e-5, 3.31662;
    2940.97, 2.75743e-5, 2.23607;
    2942.53, 4.96337e-5, 3;
    2944.09, 1.65446e-5, 1.73205;
    2945.65, 3.30892e-5, 2.44949;
    2947.2, 7.7208e-5, 3.74166;
    2948.76, 5.51486e-5, 3.16228;
    2950.32, 9.37526e-5, 4.12311
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], [
    2941.5, 0.00078484, 9.48683;
    2942.5, 0.000819722, 9.69536;
    2943.5, 0.000898206, 10.1489;
    2944.5, 0.000906927, 10.198;
    2945.5, 0.0011075, 11.2694;
    2946.5, 0.00107262, 11.0905;
    2947.5, 0.00115982, 11.5326;
    2948.5, 0.00129063, 12.1655;
    2949.5, 0.00114238, 11.4455;
    2950.5, 0.0014912, 13.0767
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], [
    4490.8, 3.11538e-6, 1;
    4492.36, 6.23076e-6, 1.41421;
    4493.92, 6.23076e-6, 1.41421;
    4495.48, 1.24615e-5, 2;
    4497.04, 1.86923e-5, 2.44949;
    4498.59, 9.34613e-6, 1.73205;
    4500.15, 9.34613e-6, 1.73205;
    4501.71, 9.34613e-6, 1.73205;
    4503.27, 3.11538e-6, 1;
    4504.83, 6.23076e-6, 1.41421
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], [
    4498.5, 0.000280769, 8.12404;
    4499.5, 0.000293531, 8.30662;
    4500.5, 0.000285023, 8.18535;
    4501.5, 0.00045944, 10.3923;
    4502.5, 0.000395629, 9.64365;
    4503.5, 0.000399883, 9.69536;
    4504.5, 0.000425407, 10;
    4505.5, 0.00038712, 9.53939;
    4506.5, 0.000442423, 10.198;
    4507.5, 0.000514742, 11
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], [
    6056.4, 1.04525e-5, 1.73205;
    6057.95, 1.04525e-5, 1.73205;
    6059.51, 1.04525e-5, 1.73205;
    6061.07, 3.48418e-6, 1;
    6062.63, 1.04525e-5, 1.73205;
    6064.19, 3.48418e-6, 1;
    6065.75, 3.48418e-6, 1;
    6067.31, 6.96836e-6, 1.41421;
    6068.86, 6.96836e-6, 1.41421;
    6070.42, 1.39367e-5, 2
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], [
    6071.5, 0.00019969, 6;
    6072.5, 0.000110939, 4.47214;
    6073.5, 0.000221878, 6.32456;
    6074.5, 0.00019969, 6;
    6075.5, 0.000149768, 5.19615;
    6076.5, 0.00018305, 5.74456;
    6077.5, 0.000155315, 5.2915;
    6078.5, 0.000216331, 6.245;
    6079.5, 0.000177503, 5.65685;
    6080.5, 0.000277348, 7.07107
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], [
    7652.34, 2.13243e-5, 2;
    7653.9, 4.26485e-5, 2.82843;
    7655.46, 0, 0;
    7657.02, 2.13243e-5, 2;
    7658.57, 5.33107e-6, 1;
    7660.13, 1.59932e-5, 1.73205;
    7661.69, 5.33107e-6, 1;
    7663.25, 2.13243e-5, 2;
    7664.81, 1.06621e-5, 1.41421;
    7666.37, 1.06621e-5, 1.41421
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], [
    7652.5, 8.13651e-5, 2.64575;
    7653.5, 0.000116236, 3.16228;
    7654.5, 5.81179e-5, 2.23607;
    7655.5, 8.13651e-5, 2.64575;
    7656.5, 0.000116236, 3.16228;
    7657.5, 0.000104612, 3;
    7658.5, 9.29887e-5, 2.82843;
    7659.5, 0.000151107, 3.60555;
    7660.5, 8.13651e-5, 2.64575;
    7661.5, 0.000139483, 3.4641
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], [
    9232.17, 1.78437e-5, 1.41421;
    9233.73, 8.92186e-6, 1;
    9235.29, 1.78437e-5, 1.41421;
    9236.84, 8.92186e-6, 1;
    9238.4, 2.67656e-5, 1.73205;
    9239.96, 8.92186e-6, 1;
    9241.52, 3.56874e-5, 2;
    9243.08, 8.92186e-6, 1;
    9244.64, 8.92186e-6, 1;
    9246.2, 8.92186e-6, 1
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], [
    9232.5, 7.19459e-5, 1.73205;
    9233.5, 4.79639e-5, 1.41421;
    9234.5, 4.79639e-5, 1.41421;
    9235.5, 0.000143892, 2.44949;
    9236.5, 4.79639e-5, 1.41421;
    9237.5, 2.3982e-5, 1;
    9238.5, 2.3982e-5, 1;
    9239.5, 9.59279e-5, 2;
    9240.5, 4.79639e-5, 1.41421;
    9241.5, 7.19459e-5, 1.73205
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]]
pt1 := exp_pls[0]
pc1 := exp_pls[1]
pt2 := exp_pls[2]
pc2 := exp_pls[3]
(pt1[1, 0] - pt1[0, 0])*sum(pt1[:, 1]) = 1
pt3 := exp_pls[4]
pc3 := exp_pls[5]
pt4 := exp_pls[6]
pc4 := exp_pls[7]
pt5 := exp_pls[8]
pc5 := exp_pls[9]
(pc1[1, 0] - pc1[0, 0])*sum(pc1[:, 1]) = 1
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