h := 6.636*10^-34*m^2*kg/s
m_n := 1.6749*10^-27*kg
k_b := 1.38064852*10^-23*J/K
eV := 1.60218*10^-19*J
ω := 500*2*π*sec^-1
# Merlin Gd chopper:
R_ch := 5*mm
H_ch := 0.2*mm
ρ := 10^6*m
γ := ω*R_ch^2/H_ch = 392.699 m/s
ω = 3141.59 1/s
# MERLIN distances (counted from moderator)
L_2 := 2.5*m
L_chop := 10 m
L_samp := 11.8*m
L_det := L_2 + L_samp  # Assuming L_chop=L_Ei_mon1
ε_beg := 150
ε_end := 11  # Chopper opening time:
Δt := R_ch/γ
Δt = 1.27324e-5 s
v(ε) := sqrt(2*1.60218*10^-22*J/m_n*ε)
v(ε_end) = 1450.68 m/s  # TOF for energy ε at the positon L in chopper opening time units:
τ_e(ε, L) := L*ω*R_ch/(v(ε)*H_ch)
v(ε_beg) = 5357 m/s
τ_e(151.9276, L_chop) = 145.678
V_char := (L_det - L_samp)/Δt
V_char = 196350 m/s
N_p := 1000
V_sc := v(ε_beg)/V_char*1000
σ_v := 0.1*V_sc
a_1 := 10
σ_1 := 0.01*V_sc
v_1 := 0
a_2 := 15
σ_2 := 0.05*V_sc
v_2 := 0.2*V_sc
v0 := V_sc
L_v := 3*V_sc
a_3 := 10
σ_3 := 0.1*V_sc
v_3 := 0.5*V_sc
fs(Δv) := a_1/(sqrt(2*π)*σ_1)*e^(-0.5*(Δv/σ_1)^2) + (e^(-(Δv - v_2)^2/(2*σ_2^2)) + 0.5*e^(-(Δv + v_2)^2/(2*σ_2^2)))/(sqrt(2*π)*σ_2)*a_2 + a_3/(sqrt(2*π)*σ_3)*e^(-(Δv - v_3)^2/(2*σ_3^2))
R_v(v, v0) :=
    vp ← v - v0
    return 0 if vp < 0
    otherwise
        vp2 ← vp*vp
        return σ_v^(3/2)*vp2*sqrt(2*π)*e^(-0.5*vp2/(σ_v*σ_v))
fm(v) := integral(R_v(v - δv, v0)*fs(δv), δv = -L_v/2 + v0 .. v0) + integral(R_v(v - δv, v0)*fs(δv), δv = v0 .. L_v/2 + v0)
Δ_v := L_v/(N_p - 1)
i := 0 .. N_p - 1
vf[i] := -L_v/2 + v0 + i*Δ_v
fi[i] := fs(vf[i])
Rf[i] := R_v(vf[i], v0)
fsi[i] := fm(vf[i])
v0 = 27.283
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M(v) :=
    0 if v < -L_v/2 + v0 or v > L_v/2 + v0
    linterp(vf, fsi, v) otherwise
# high frequency filter for spectra:
ε_Res := 1*10^-6
# high frequency filter for spectra:
if(|n - 50| < 40, 0, D[n])
filts(I, R, Nf, Shift) :=
    np ← length(I)
    cent ← np/2
    cutR ← ε_Res*|R[0]|
    for k ∈ 0 .. np - 1
        rez[k] ← 0 if |k - cent| < Nf
        otherwise
            Δs ← e^(2*π*1i*k*Shift) if k < cent
            Δs ← e^(-2*π*1i*k*Shift) otherwise
            rez[k] ← 0 if |R[k]| < cutR
            rez[k] ← I[k]*Δs/(R[k] + ε_Res) otherwise
ε_Res := 10^-9
filt(I, R, Nf) :=
    np ← length(I)
    cent ← np/2
    for i ∈ 0 .. np - 1
        rez[i] ← 0 if |i - cent| < Nf
        otherwise
            rez[i] ← 0 if |R[i]| < ε_Res
            rez[i] ← I[i]/(R[i] + ε_Res) otherwise
# ----------------------------------------------------------------------------------------------------------------------------------------------------------------------------------------
Ib_ω := cfft(fsi)
Rbf_ω := cfft(Rf)
τ_1 := 1
τ_2 := 0.1
R1 := 0.5
v0/(Δ_v*N_p) = 0.333
R_t(τ) :=
    return 0 if τ < 0
    return τ^2*e^(-τ/τ_1)/τ_1*((1 - R1) + R1/(τ_2 + τ_1)*e^(-τ/τ_2)) otherwise
Sb_ω := filts(Ib_ω, Rbf_ω, 396, 0.5)
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t_min := L_2/(R_ch*max(vf))
t_min = 7.33058
L2_p := L_2/R_ch
L_v = 81.849
L2_p = 500
I(t) := integral(R_t(t - L2_p/v)*M(v), v = 0.1 .. L_v/2) + integral(R_t(t - L2_p/v)*M(v), v = L_v/2 .. 3*L_v) + integral(R_t(t - L2_p/v)*M(v), v = 3*L_v .. ∞)
δt := (200 - t_min)/N_p
t[i] := 0.1 + δt*i
If[i] := I(t[i])
R_tt[i] := R_t(t[i])
T := max(t)
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fbv := 1/(Δ_v*sqrt(N_p))*icfft(Sb_ω)
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I_tω := cfft(If)
R_tω := cfft(R_tt)
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If1 := filt(I_tω, R_tω, 320)
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Δ := T/(N_p - 1)
Ifr := 1/(Δ*sqrt(N_p - 1))*icfft(If1)
tr[i] := Δ*i + 0.001
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v2[i] := L2_p/t[N_p - 1 - i]
M_rr[i] := Ifr[N_p - i - 1]*t[N_p - i - 1]^2/L2_p
max(tr) = 192.578
v_max := max(v2)
v_min := min(v2)
v_max = 5000
v_min = 2.59637
v_min := 2  # disabled
v_max := 100
Npi := 1*N_p
ii := 0 .. Npi - 1
Npi = 1000
Δv := (v_max - v_min)/(Npi - 1)
v_r[ii] := v_min + ii*Δv
length(v_r) = 1000
tr_min := min(tr)
tr_max := max(tr)
Mif(v) :=
    ti ← L2_p/v
    In ← 0 if ti < tr_min or ti > tr_max
    In ← linterp(tr, Ifr, ti) otherwise
    rez ← In*ti^2/L2_p
Mr1[ii] := Mif(v_r[ii])
Rf2[ii] := R_v(v_r[ii], v0)
length(Mr1) = 1000
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I_ω := cfft(Mr1)
R_ω := cfft(Rf2)
sp := 1
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Sr_ω := filts(I_ω, R_ω, 460, 0.5)
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fr := 1/(Δ_v*sqrt(Npi))*icfft(Sr_ω)
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